# OpenSim document version 30000
Model:
  ForceSet:
    Thelen2003Muscle muscle0: max_isometric_force=1000 optimal_fiber_length=0.1410809 tendon_slack_length=0.01567566
        stiffness=100000 dissipation=1
      PathPoint muscle0_node0: base (0.005265138 0.01885445 0.03195998)
      PathPoint muscle0_node1: lower_arm (0.1327966 0.1039336 -0.144422)
      PathWrap PathWrap3: wrap_object=WrapJoint2 method=midpoint
      PathWrap PathWrap2: wrap_object=WrapJoint method=midpoint
    Thelen2003Muscle muscle1: max_isometric_force=1000 optimal_fiber_length=0.1410809 tendon_slack_length=0.01567566
        stiffness=100000 dissipation=1
      PathPoint muscle1_node0: base (0.004040154 0.02000426 -0.2310606)
      PathPoint muscle1_node1: lower_arm (0.1327966 0.1039336 -0.153422)
      PathWrap PathWrap3: wrap_object=WrapJoint2 method=midpoint
      PathWrap PathWrap2: wrap_object=WrapJoint method=midpoint
    Thelen2003Muscle muscle2: max_isometric_force=1000 optimal_fiber_length=0.1410809 tendon_slack_length=0.01567566
        stiffness=100000 dissipation=1
      PathPoint muscle2_node0: lower_arm (0.1302024 0.3521968 -0.1225874)
      PathPoint muscle2_node1: upper_arm (0.09471749 0.1312151 -0.1945634)
      PathWrap PathWrap3: wrap_object=WrapJoint2 method=midpoint
      PathWrap PathWrap2: wrap_object=WrapJoint method=midpoint
    Thelen2003Muscle muscle3: max_isometric_force=1000 optimal_fiber_length=0.1410809 tendon_slack_length=0.01567566
        stiffness=100000 dissipation=1
      PathPoint muscle3_node0: lower_arm (0.1339669 0.3271968 -0.178378)
      PathPoint muscle3_node1: upper_arm (0.09471749 0.1312151 -0.2270231)
      PathWrap PathWrap3: wrap_object=WrapJoint2 method=midpoint
      PathWrap PathWrap2: wrap_object=WrapJoint method=midpoint
  BodySet:
    Body lower_arm:
      WrapCylinder WrapJoint2: xyz_body_rotation=(0 0 1.57) translation=(0 0.38 0) radius=0.023 length=0.05
      WrapCylinder WrapJoint: xyz_body_rotation=(0 0 1.57) translation=(0 0.42 0) radius=0.022 length=0.05
